ORIGIN := 1
f1(x, y) := tan(x*y + 0.4) - x^2
f2(x, y) := 0.6*x^2 + 2*y^2 - 1
x0 := [0.01; 1]
A(x, y) := [d/dx(f1(x, y)), d/dy(f1(x, y)); d/dx(f2(x, y)), d/dy(f2(x, y))]
f(x, y) := [f1(x, y); f2(x, y)]
A(x0[1], x0[2]) = [1.1689, 0.011889; 0.012, 4]
f(x0[1], x0[2]) = [0.434531; 1.00006]
x := x0[1]
y := x0[2]
Given
tan(x*y + 0.4) - x^2 == 0
0.6*x^2 + 2*y^2 - 1 == 0
Find(x, y) = [-0.379848; 0.675807]
Given
tan(x*y + 0.4) - x^2 == 0
0.6*x^2 + 2*y^2 - 1 == 0
Minerr(x, y) = [-0.379848; 0.675807]
i := 1 .. 100
j := 1 .. 100
x[i] := -5 + 0.1*i
y[j] := -5 + 0.1*j
M3[i, j] := f1(x[i], y[j]) + f2(x[i], y[j])
# [component: inputs M3]
# [component: inputs M3]
Ф := A(x0[1], x0[2])
Ф^-1 = [0.855528, -0.00254285; -0.00256658, 0.250008]
xv[:, 1] := x0
i := 1 .. 11
xv[:, i + 1] := xv[:, i] - Ф^-1*f(xv[:, i][1], xv[:, i][2])
xv = [
    0.01, -0.359211, -0.36032, -0.37656, -0.377386, -0.379272, -0.379513, -0.379753, -0.379801, -0.379833, -0.379842, -0.379846;
    1, 0.751093, 0.699671, 0.685475, 0.67927, 0.677209, 0.676327, 0.676014, 0.675885, 0.675837, 0.675818, 0.675811
]
Nliniter(f, A, n, x0, ε) :=
    norm ← sqrt(|x0|)
    for i ∈ 1 .. n
        x1[i] ← x0[i]
    while norm > ε
        fun ← -f(x1[1], x1[2])
        B ← A(x1[1], x1[2])
        x2 ← lsolve(B, fun)
        norm ← sqrt(|x2|)
        x2 ← x1 + x2
        x1 ← x2
    x2
Newtsyst(f, A, n, x0, ε) :=
    norm ← sqrt(|x0|)
    for i ∈ 1 .. n
        x1[i] ← x0[i]
    fun ← f(x1[1], x1[2])
    while norm > ε
        B ← A(x1[1], x1[2])
        Ф ← B^-1
        for i ∈ 1 .. n
            x2[i] ← x1[i] - sum(Ф[i, j]*fun[i], j = 1 .. n)
        fun ← f(x2[1], x2[2])
        norm ← sqrt(|fun|)
        x1 ← x2
    x2
ε := 10^-6
xx := Newtsyst(f, A, 2, x0, ε)
xx = [-0.379848; 0.675807]
xy := Nliniter(f, A, 2, x0, ε)
xy = [-0.379848; 0.675807]
x0 := [1; 1]
xx := Newtsyst(f, A, 2, x0, ε)
xx = [0.379848; -0.675807]
x0 := [2; 5]
xx := Newtsyst(f, A, 2, x0, ε)
xx = [0.379848; -0.675807]
x0 := [10; 10]
xx := Newtsyst(f, A, 2, x0, ε)  # error: Это вычисление не приближается к решению.
