ORIGIN := 1
f1(x, y) := sin(y - 1) + x - 1.3
f2(x, y) := y - sin(x + 1) - 0.8
x0 := [0.01; 2]
A(x, y) := [d/dx(f1(x, y)), d/dy(f1(x, y)); d/dx(f2(x, y)), d/dy(f2(x, y))]
f(x, y) := [f1(x, y); f2(x, y)]
A(x0[1], x0[2]) = [1, 0.540302; -0.531861, 1]
f(x0[1], x0[2]) = [-0.448529; 0.353168]
x := x0[1]
y := x0[2]
Given
sin(y - 1) + x - 1.3 == 0
y - sin(x + 1) - 0.8 == 0
Find(x, y) = [0.582693; 1.79993]
Given
sin(y - 1) + x - 1.3 == 0
y - sin(x + 1) - 0.8 == 0
Minerr(x, y) = [0.582693; 1.79993]
i := 1 .. 100
j := 1 .. 100
x[i] := -5 + 0.1*i
y[j] := -5 + 0.1*j
M3[i, j] := f1(x[i], y[j]) + f2(x[i], y[j])
# [component: inputs M3]
# [component: inputs M3]
Ф := A(x0[1], x0[2])
Ф^-1 = [0.77678, -0.419696; 0.413139, 0.77678]
xv[:, 1] := x0
i := 1 .. 11
xv[:, i + 1] := xv[:, i] - Ф^-1*f(xv[:, i][1], xv[:, i][2])
xv = [
    0.01, 0.506632, 0.556609, 0.574064, 0.579639, 0.581632, 0.582319, 0.582562, 0.582647, 0.582677, 0.582688, 0.582691;
    2, 1.91097, 1.82452, 1.80918, 1.80296, 1.80102, 1.80031, 1.80006, 1.79998, 1.79995, 1.79994, 1.79993
]
Nliniter(f, A, n, x0, ε) :=
    norm ← sqrt(|x0|)
    for i ∈ 1 .. n
        x1[i] ← x0[i]
    while norm > ε
        fun ← -f(x1[1], x1[2])
        B ← A(x1[1], x1[2])
        x2 ← lsolve(B, fun)
        norm ← sqrt(|x2|)
        x2 ← x1 + x2
        x1 ← x2
    x2
Newtsyst(f, A, n, x0, ε) :=
    norm ← sqrt(|x0|)
    for i ∈ 1 .. n
        x1[i] ← x0[i]
    fun ← f(x1[1], x1[2])
    while norm > ε
        B ← A(x1[1], x1[2])
        Ф ← B^-1
        for i ∈ 1 .. n
            x2[i] ← x1[i] - sum(Ф[i, j]*fun[i], j = 1 .. n)
        fun ← f(x2[1], x2[2])
        norm ← sqrt(|fun|)
        x1 ← x2
    x2
ε := 10^-6
xx := Newtsyst(f, A, 2, x0, ε)
xx = [0.582693; 1.79993]
xy := Nliniter(f, A, 2, x0, ε)
xy = [0.582693; 1.79993]
