ORIGIN := 1
x := [-1; 0; 1; 4]
y := [2; 3; 12; 147]
M1(x) := [x + 1, -1, -2, -5; 1, x - 0, -1, -4; 2, 1, x - 1, -3; 5, 4, 3, x - 4]
P(x) := product(M1(x)[i, i], i = 1 .. 4) simplify → x*(x - 1)*(x + 1)*(x - 4)
D1(x) := product(M1(x)[1, i], i = 1 .. 4) simplify → -10*x - 10
D2(x) := product(M1(x)[2, i], i = 1 .. 4) simplify → 4*x
D3(x) := product(M1(x)[3, i], i = 1 .. 4) simplify → 6 - 6*x
D4(x) := product(M1(x)[4, i], i = 1 .. 4) simplify → 60*x - 240
l1(x) := P(x)/D1(x) simplify → -x*(x - 1)*(x - 4)/10
l2(x) := P(x)/D2(x) simplify → (x - 1)*(x + 1)*(x - 4)/4
l3(x) := P(x)/D3(x) simplify → -x*(x + 1)*(x - 4)/6
l4(x) := P(x)/D4(x) simplify → x*(x^2 - 1)/60
Lag(x) := y[1]*l1(x) + y[2]*l2(x) + y[3]*l3(x) + y[4]*l4(x) simplify → (x + 3)*(x^2 + x + 1)
Lag(0) = 3
Lag(0.5) = 6.125
