ORIGIN := 1
xt := 0.478
x := [0.45; 0.47; 0.52; 0.61; 0.66; 0.70; 0.74; 0.79]
y := [2.5742; 2.3251; 2.0934; 1.8620; 1.7493; 1.6210; 1.3418; 1.1212]
f(x) := y
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i := 1 .. 8
Lag[i, 1] := x[i]
Lag[i, 2] := y[i]
Lag[i, 3] := x[i] - xt
i := 1 .. 7
Lag[i + 1, 4] := 1/(x[i + 1] - x[i])*(y[i]*Lag[i + 1, 3] - y[i + 1]*Lag[i, 3])
Lag = [
    0.45, 2.5742, -0.028, 0;
    0.47, 2.3251, -0.008, 2.22546;
    0.52, 2.0934, 0.042, 2.28803;
    0.61, 1.862, 0.132, 2.20139;
    0.66, 1.7493, 0.182, 2.15953;
    0.7, 1.621, 0.222, 2.33307;
    0.74, 1.3418, 0.262, 3.17056;
    0.79, 1.1212, 0.312, 2.49774
]
i := 1 .. 6
Lag[i + 2, 5] := 1/(x[i + 2] - x[i])*(Lag[i + 2, 3]*Lag[i + 1, 4] - Lag[i, 3]*Lag[i + 2, 4])
i := 1 .. 5
Lag[i + 3, 6] := 1/(x[i + 3] - x[i])*(Lag[i + 3, 3]*Lag[i + 2, 5] - Lag[i, 3]*Lag[i + 3, 5])
i := 1 .. 4
Lag[i + 4, 7] := 1/(x[i + 4] - x[i])*(Lag[i + 4, 3]*Lag[i + 3, 6] - Lag[i, 3]*Lag[i + 4, 6])
i := 1 .. 3
Lag[i + 5, 8] := 1/(x[i + 5] - x[i])*(Lag[i + 5, 3]*Lag[i + 4, 7] - Lag[i, 3]*Lag[i + 5, 7])
Lag = [
    0.45, 2.5742, -0.028, 0, 0, 0, 0, 0;
    0.47, 2.3251, -0.008, 2.22546, 0, 0, 0, 0;
    0.52, 2.0934, 0.042, 2.28803, 2.25049, 0, 0, 0;
    0.61, 1.862, 0.132, 2.20139, 2.28308, 2.25619, 0, 0;
    0.66, 1.7493, 0.182, 2.15953, 2.21394, 2.28017, 2.25939, 0;
    0.7, 1.621, 0.222, 2.33307, 1.90501, 2.28603, 2.28037, 2.26174;
    0.74, 1.3418, 0.262, 3.17056, 0.427764, 3.40498, 2.07241, 2.27421;
    0.79, 1.1212, 0.312, 2.49774, 4.83017, -5.73561, 10.1081, 0.822421
]
Lag(x, y, z, n) :=
    M[:, 1] ← x
    M[:, 2] ← z
    M[:, 3] ← y
    for i ∈ 1 .. n - 1
        for j ∈ 1 .. n - i
            a ← 1/(x[i + j] - x[j])
            det ← M[i + j, 2]*M[i + j - 1, i + 2] - M[j, 2]*M[i + j, i + 2]
            M[i + j, i + 3] ← a*det
    M
i := 1 .. 8
z[i] := x[i] - xt
MM := Lag(x, y, z, 8)
MM = [
    0.45, -0.028, 2.5742, 0, 0, 0, 0, 0, 0, 0;
    0.47, -0.008, 2.3251, 2.22546, 0, 0, 0, 0, 0, 0;
    0.52, 0.042, 2.0934, 2.28803, 2.25049, 0, 0, 0, 0, 0;
    0.61, 0.132, 1.862, 2.20139, 2.28308, 2.25619, 0, 0, 0, 0;
    0.66, 0.182, 1.7493, 2.15953, 2.21394, 2.28017, 2.25939, 0, 0, 0;
    0.7, 0.222, 1.621, 2.33307, 1.90501, 2.28603, 2.28037, 2.26174, 0, 0;
    0.74, 0.262, 1.3418, 3.17056, 0.427764, 3.40498, 2.07241, 2.27421, 2.26294, 0;
    0.79, 0.312, 1.1212, 2.49774, 4.83017, -5.73561, 10.1081, 0.822421, 2.23791, 2.26088
]
