ORIGIN := 1
xT := 0.195
y := [9.9182; 9.5194; 9.1365; 8.8769; 8.4164; 8.0779; 7.7530; 7.4412]
x := [0.01; 0.11; 0.16; 0.23; 0.28; 0.39; 0.46; 0.50]
Newt(x, y, n) :=
    M[:, 1] ← x
    M[:, 2] ← y
    for j ∈ 1 .. n - 1
        for i ∈ 1 .. n - j
            M[i, j + 2] ← (M[i + 1, j + 1] - M[i, j + 1])/(x[i + j] - x[i])
    M
M := Newt(x, y, 8)
M = [
    0.01, 9.9182, -3.988, -24.4667, 260.812, -2681.81, 14851.1, -63878.7, 238811;
    0.11, 9.5194, -7.658, 32.9119, -463.277, 2961.62, -13894.2, 53138.9, 0;
    0.16, 9.1365, -3.70857, -45.8452, 365.977, -1901.36, 6829.91, 0, 0;
    0.23, 8.8769, -9.21, 38.3295, -204.432, 420.807, 0, 0, 0;
    0.28, 8.4164, -3.07727, -8.68975, -90.814, 0, 0, 0, 0;
    0.39, 8.0779, -4.64143, -28.6688, 0, 0, 0, 0, 0;
    0.46, 7.753, -7.795, 0, 0, 0, 0, 0, 0;
    0.5, 7.4412, 0, 0, 0, 0, 0, 0, 0
]
P1(z) := 9.918 - 3.988*(z - 0.01) simplify → -3.988*z + 9.95788
P2(z) := P1(z) + (-24.467*(z - 0.01)*(z - 0.11)) simplify → 9.9309663 - 1.05196*z - 24.467*z^2
P3(z) := P2(z) + 260.812*(z - 0.01)*(z - 0.11)*(z - 0.16) simplify → 260.812*z^3 - 97.49436*z^2 + 4.2425236*z + 9.885063388
P4(z) := P3(z) + (-2.682*10^3*((z - 0.01)*(z - 0.11)*(z - 0.16)*(z - 0.23))) simplify → 1628.632*z^3 - 2682.0*z^4 - 324.65976*z^2 + 17.2368136*z + 9.776496028
P5(z) := P4(z) + 1.485*10^4*((z - 0.01)*(z - 0.11)*(z - 0.16)*(z - 0.23)*(z - 0.28)) simplify → 14850.0*z^5 - 14413.5*z^4 + 5007.007*z^3 - 748.79061*z^2 + 37.9834516*z + 9.608180188
P6(z) := P5(z) + (-6.388*10^4*((z - 0.01)*(z - 0.11)*(z - 0.16)*(z - 0.23)*(z - 0.28)*(z - 0.39))) simplify → 90228.4*z^5 - 63880.0*z^6 - 48627.628*z^4 + 12499.23668*z^3 - 1549.5819856*z^2 + 73.513226528*z + 9.32580401392
P7(z) := P6(z) + 2.388*10^5*((z - 0.01)*(z - 0.11)*(z - 0.16)*(z - 0.23)*(z - 0.28)*(z - 0.39)*(z - 0.46)) simplify → 238800.0*z^7 - 455512.0*z^6 + 347750.32*z^5 - 135470.1136*z^4 + 28376.434964*z^3 - 3059.44174264*z^2 + 135.665796138*z + 8.84023015715
P1(xT) = 9.18022
P2(xT) = 8.79548
P3(xT) = 8.93902
P4(xT) = 8.99068
P5(xT) = 9.015
P6(xT) = 9.0354
P7(xT) = 9.0556
