ORIGIN := 1
Tabl(x, y, n) :=
    M[:, 1] ← x
    M[:, 2] ← y
    for j ∈ 1 .. n - 1
        for i ∈ 1 .. n - j
            M[i, j + 2] ← M[i + 1, j + 1] - M[i, j + 1]
    M
omega(x, n) :=
    for j ∈ 1 .. n
        a[j, 1] ← 1
        a[j, 2] ← sum(x[i], i = 1 .. j)
    if n == 1
        a[1, 2] ← -a[1, 2]
        return a
    for i ∈ 2 .. n
        a[i, i + 1] ← product(x[j], j = 1 .. i)
    if n == 2
        a[2, 2] ← -a[2, 2]
        return a
    for i ∈ 3 .. n
        for j ∈ i .. n
            a[j, i] ← a[j - 1, i] + a[j - 1, i - 1]*x[j]
    for i ∈ 2, 4 .. n + 1
        for j ∈ 1 .. n
            a[j, i] ← (-1)*a[j, i]
    a
PolinNewtConst(x, y, n, m, ε) :=
    M ← Tabl(x, y, n)
    a ← omega(x, n)
    h ← x[2] - x[1]
    h1 ← h
    c ← 1
    if m > 2
        for i ∈ 1 .. n - 1
            if |M[1, i + 2]| < ε
                m ← i - 1
                break
    for i ∈ 1 .. m
        c ← c*i
        b[i] ← M[1, i + 2]/(c*h1)
        h1 ← h1*h
        for j ∈ 1 .. i + 1
            a[i, j] ← a[i, j]*b[i]
    b[1] ← a[m, 1]
    b[m + 1] ← sum(a[i, i + 1], i = 1 .. m) + M[1, 2]
    return b if m == 1
    for i ∈ 1 .. m - 1
        k ← m - i + 1
        b[k] ← sum(a[i + j - 1, j], j = 1 .. k)
    b
x := [1.15; 1.55; 1.95; 2.35; 2.75; 3.15; 3.55; 3.95; 4.35; 4.75]
y := [66.1659; 63.9989; 61.9658; 60.0551; 58.2558; 56.5583; 54.6807; 52.7220; 50.5229; 48.1091]
xt := 4.680
M2 := Tabl(x, y, 10)
M2 = [
    1.15, 66.1659, -2.167, 0.1339, -0.0115, 0.0005, 0.0009, -0.2746, 1.2015, -3.4208, 8.015;
    1.55, 63.9989, -2.0331, 0.1224, -0.011, 0.0014, -0.2737, 0.9269, -2.2193, 4.5942, 0;
    1.95, 61.9658, -1.9107, 0.1114, -0.0096, -0.2723, 0.6532, -1.2924, 2.3749, 0, 0;
    2.35, 60.0551, -1.7993, 0.1018, -0.2819, 0.3809, -0.6392, 1.0825, 0, 0, 0;
    2.75, 58.2558, -1.6975, -0.1801, 0.099, -0.2583, 0.4433, 0, 0, 0, 0;
    3.15, 56.5583, -1.8776, -0.0811, -0.1593, 0.185, 0, 0, 0, 0, 0;
    3.55, 54.6807, -1.9587, -0.2404, 0.0257, 0, 0, 0, 0, 0, 0;
    3.95, 52.722, -2.1991, -0.2147, 0, 0, 0, 0, 0, 0, 0;
    4.35, 50.5229, -2.4138, 0, 0, 0, 0, 0, 0, 0, 0;
    4.75, 48.1091, 0, 0, 0, 0, 0, 0, 0, 0, 0
]
ε := 10^-3
a2 := PolinNewtConst(x, y, 10, 9, ε)
a2 = [-0.0299479; 0.557695; -6.75834; 73.246]
P3(x) := (a2[1]*x^3 + a2[2]*x^2 + a2[3]*x) + a2[4]
P3(xt) = 50.7621
