ORIGIN := 1
y0 := [
    12.28, 12.51;
    12.53, 12.34;
    12.50, 12.22;
    12.53, 11.84;
    12.75, 11.67;
    12.85, 11.27;
    12.77, 11.06;
    12.76, 10.73;
    12.73, 10.35;
    12.85, 10.09
]
y1 := submatrix(y0, 1, 10, 1, 1)
y2 := submatrix(y0, 1, 10, 2, 2)
y1 = [12.28; 12.53; 12.5; 12.53; 12.75; 12.85; 12.77; 12.76; 12.73; 12.85]
y2 = [12.51; 12.34; 12.22; 11.84; 11.67; 11.27; 11.06; 10.73; 10.35; 10.09]
y := stack(y1, y2)
y3 := augment(y1, y2)
y4 := augment(y2, y1)
y = [12.28; 12.53; 12.5; 12.53; 12.75; 12.85; 12.77; 12.76; 12.73; 12.85; 12.51; 12.34; 12.22; 11.84; 11.67; 11.27; 11.06; 10.73; 10.35; 10.09]
x := [0.1; 0.2; 0.3; 0.4; 0.5; 0.6; 0.7; 0.8; 0.9; 1.0; 1.1; 1.2; 1.3; 1.4; 1.5; 1.6; 1.7; 1.8; 1.9; 2.0]
y3 = [
    12.28, 12.51;
    12.53, 12.34;
    12.5, 12.22;
    12.53, 11.84;
    12.75, 11.67;
    12.85, 11.27;
    12.77, 11.06;
    12.76, 10.73;
    12.73, 10.35;
    12.85, 10.09
]
y4 = [
    12.51, 12.28;
    12.34, 12.53;
    12.22, 12.5;
    11.84, 12.53;
    11.67, 12.75;
    11.27, 12.85;
    11.06, 12.77;
    10.73, 12.76;
    10.35, 12.73;
    10.09, 12.85
]
n := 20
m := cols(y3)
m = 2
n1 := rows(y4)
n1 = 10
min(y) = 10.09
max(y) = 12.85
length(y1) = 10
last(y) = 20
x1 := sum(x[i], i = 1 .. n)
x1 = 21
x2 := sum(x[i]^2, i = 1 .. n)
x2 = 28.7
x4 := sum(x[i]^4, i = 1 .. n)
x4 = 72.2666
x3 := sum(x[i]^3, i = 1 .. n)
x3 = 44.1
xy := sum(x[i]*y[i], i = 1 .. n)
xy = 244.564
x2y := sum(x[i]^2*y[i], i = 1 .. n)
x2y = 325.478
y11 := sum(y[i], i = 1 .. n)
y11 = 240.63
A1 := [20, 21; 21, 28.7]
A1^-1 = [0.215789, -0.157895; -0.157895, 0.150376]
b1 := [240.63; 244.564]
a1 := A1^-1*b1
a1 = [13.3101; -1.21767]
A := [20, 21, 28.7; 21, 28.7, 44.1; 28.7, 44.1, 72.2666]
A^-1 = [0.553509, -1.07895, 0.438596; -1.07895, 2.66234, -1.19617; 0.438596, -1.19617, 0.569606]
b := [240.63; 244.564; 325.478]
a2 := A^-1*b
a2 = [12.0726; 2.15709; -1.60703]
i := 1 .. n
y12[i] := a1[1] + a1[2]*x[i]
y13[i] := a2[1] + a2[2]*x[i] + a2[3]*x[i]^2
r1[i] := (y[i] - y12[i])^2
r2[i] := (y[i] - y13[i])^2
δ1 := sqrt(1/n*sum(r1[i], i = 1 .. n))
δ2 := sqrt(1/n*sum(r2[i], i = 1 .. n))
δ1 = 0.483724
δ2 = 0.0854014
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w
[x5; y5; z] := [1; 1; 1]
Given
20*x5 + 21*y5 + 28.7*z == 240.63
21*x5 + 28.7*y5 + 44.1*z == 244.564
28.7*x5 + 44.1*y5 + 72.2666*z == 325.478
Find(x5, y5, z) = [12.0726; 2.15709; -1.60703]
[xx; yy; zz] := [1; 1; 1]
Given
20*xx + 21*yy + 28.7*zz == 240.63
21*xx + 28.7*yy + 44.1*zz == 244.564
28.7*xx + 44.1*yy + 72.2666*zz == 325.478
Minerr(xx, yy, zz) = [12.0726; 2.15709; -1.60703]
a22 := lsolve(A, b)
a22 = [12.0726; 2.15709; -1.60703]
MHK(x, y, n, m) :=
    for k ∈ 1 .. m + 1
        for j ∈ 1 .. m + 1
            A[j, k] ← sum(x[l]^(j + k - 2), l = 1 .. n)
        b[k] ← sum(y[l]*x[l]^(k - 1), l = 1 .. n)
    a ← lsolve(A, b)
    for i ∈ 1 .. n
        y1[i] ← 0
        for j ∈ 1 .. m + 1
            y1[i] ← y1[i] + a[j]*x[i]^(j - 1)
    r ← sum((y[i] - y1[i])^2, i = 1 .. n)
    a[m + 2] ← sqrt(r/n)
    a
a23 := MHK(x, y, 20, 1)
a24 := MHK(x, y, 20, 2)
a25 := MHK(x, y, 20, 3)
a26 := MHK(x, y, 20, 4)
a23 = [13.3101; -1.21767; 0.483724]
a24 = [12.0726; 2.15709; -1.60703; 0.0854014]
a25 = [12.0006; 2.52487; -2.03436; 0.135661; 0.08299]
a26 = [12.2534; 0.546605; 1.96877; -2.77968; 0.694128; 0.0655397]
P2(x) := 12.07264 + 2.157092*x + (-1.607029*x^2)
P4(x) := 12.253448 - 0.546605*x + 1.968772*x^2 - 2.779676*x^3 + 0.694128*x^4
P2(0.75) = 12.7865
P4(0.75) = 11.9979
