ORIGIN := 1
X := [0.050; 0.052; 0.060; 0.065; 0.069; 0.075; 0.085; 0.090; 0.096]
Y := [0.2079; 0.2081; 0.2090; 0.2095; 0.2099; 0.2105; 0.2116; 0.2121; 0.2127]
y(x) := linterp(X, Y, x)
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KLS := lspline(X, Y)
y1(x) := interp(KLS, X, Y, x)
KPS := pspline(X, Y)
y2(x) := interp(KPS, X, Y, x)
KCS := cspline(X, Y)
y3(x) := interp(KCS, X, Y, x)
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progonka1(a, b, c, d) :=
    n ← rows(b)
    γ[1] ← b[1]
    β[1] ← d[1]/γ[1]
    α[1] ← -c[1]/γ[1]
    δ1 ← -c[n]/b[1]
    γ[2] ← b[2] + a[2]*α[1]
    β[2] ← (d[2] - a[2]*β[1])/γ[2]
    α[2] ← -(c[2] + a[2]*δ1)/γ[2]
    for i ∈ 3 .. n - 1
        γ[i] ← b[i] + a[i]*α[i - 1]
        α[i] ← -c[i]/γ[i]
        β[i] ← (d[i] - a[i]*β[i - 1])/γ[i]
    γ[n] ← b[n] + α[n - 1]*(a[n] + a[1]*α[n - 2])
    β[n] ← (d[n] - a[n]*β[n - 1])/γ[n]
    α[n] ← -a[1]*(α[n - 2]*β[n - 1] + β[n - 2])/γ[n]
    x[n] ← β[n] + α[n]
    for i ∈ n - 1, n - 2 .. 2
        x[i] ← α[i]*x[i + 1] + β[i]
    x[1] ← β[1] + α[1]*x[2] + δ1*x[3]
    x
KCS := cspline(X, Y)
y3(x1) := interp(KCS, X, Y, x1)
i := 1 .. 100
x2[i] := X[1] + (X[7] - X[1])*(i - 1)/100
intspline(X, Y, n, x) :=
    h1 ← X[2] - X[1]
    h2 ← X[3] - X[2]
    b[1] ← 1/h1^2
    c[n] ← -1/h2^2
    c[1] ← b[1] + c[n]
    d[1] ← 2*((c[n]/h2)*(Y[3] - Y[2]) - b[1]*(Y[1] - Y[2])/h1)
    h1 ← X[n] - X[n - 1]
    h2 ← X[n - 1] - X[n - 2]
    a[1] ← 1/h2^2
    b[n] ← -1/h1^2
    a[n] ← a[1] + b[n]
    d[n] ← 2*((b[n]/h1)*(Y[n] - Y[n - 1]) - (a[1]/h2)*(Y[n - 2] - Y[n - 1]))
    for i ∈ 2 .. n - 1
        h1 ← X[i] - X[i - 1]
        h2 ← X[i + 1] - X[i]
        a[i] ← 1/h1
        c[i] ← 1/h2
        b[i] ← 2*(a[i] + c[i])
        d[i] ← 3*(((Y[i] - Y[i - 1])/h1^2) + ((Y[i + 1] - Y[i])/h2^2))
    xx ← progonka1(a, b, c, d)
    k ← 2
    for i ∈ 2 .. n
        break if x < X[i]
        k ← i + 1
    h ← X[k] - X[k - 1]
    h1 ← x - X[k - 1]
    h2 ← X[k] - x
    p3 ← (Y[k - 1]/h^3)*h2^2*(2*h1 + h) + xx[k - 1]*h2^2*h1/h^2
    p3 ← p3 + (Y[k]/h^3)*h1^2*(2*h2 + h) - xx[k]*h1^2*h2/h^2
    p3
y1[i] := intspline(X, Y, 7, x2[i])
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x5 := 0.128
y5 := interp(KCS, X, Y, x5)
y5 = 0.220771
y55 := intspline(X, Y, 7, x5)  # error: Индекс массива является недопустимым для этого массива.
y55 =  # error: Эта переменная не определена.
x6 := 0.136
y6 := interp(KCS, X, Y, x6)
y6 = 0.225442
y56 := intspline(X, Y, 7, x6)  # error: Индекс массива является недопустимым для этого массива.
y56 =  # error
