ORIGIN := 1
h[1] := 2
h[2] := 0.5
f(x) := ln(ln(ln(x^2)))
ξ := 10^-9
df1(x) := d/dx(f(x)) simplify → 2/(x*ln(x^2)*ln(ln(x^2)))
df2(x) := d^2/dx^2(f(x)) simplify → -2*(2*ln(ln(x^2)) + ln(x^2)*ln(ln(x^2)) + 2)/(x^2*ln(x^2)^2*ln(ln(x^2))^2)
h := h[2]
a := 1 + ξ
b := 10
n := floor((b - a)/h)
i := 1 .. n + 1
x[i] := a + h*(i - 1)
y[i] := f(x[i])
y1[i] := df1(x[i])
y2[i] := df2(x[i])
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i := 1 .. n
yR[i] := (y[i + 1] - y[i])/h
yR[n + 1] := 0
i := 2 .. n + 1
yL[i] := (y[i] - y[i - 1])/h
yL[1] := 0
i := 2 .. n
yC[i] := (y[i + 1] - y[i - 1])/(2*h)
yC[1] := 0
yC[n + 1] := 0
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y2C[i] := 0
y2C[n + 1] := 0
i := 2 .. n
y2C[i] := (y[i - 1] - 2*y[i] + y[i + 1])/h^2
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y1[2] = -7.84548
y2[2] = -43.4216
y2C[2] = 20.0147 - 12.5664i
yR[2] = 0.887535 - 6.28319i
yL[2] = -9.11984
yC[2] = -4.11615 - 3.14159i
