ORIGIN := 1
f(x) := ln(ln(ln(x^2)))
h := 0.05
a := 2
b := 10
df1(x) := d/dx(f(x)) simplify → 2/(x*ln(x^2)*ln(ln(x^2)))
integral(f(x), x) → x*ln(ln(ln(x^2))) - integral(2/ln(x^2)/ln(ln(x^2)), x)
f1(x) := integral(df1(x), x) → ln(ln(ln(x^2)))
integral(f(x), x = a .. b) = 1.03909
integral(f(x), x = a .. b) → integral(ln(ln(ln(x^2))), x = 2 .. 10)
integral(df1(x), x = a .. b) → ln(ln(ln(100))) - ln(ln(ln(4)))
integral(df1(x), x = a .. b) = 1.54234
n := floor((b - a)/h)
i := 1 .. n
x[i] := a + h*(i - 1)
fint[i] := f(x[i] + h/2)
I := h*sum(fint[j], j = 1 .. n)
I = 1.03931
parab(f, a, b, n) :=
    h ← (b - a)/n
    for i ∈ 1 .. n
        x[i] ← a + h*(i - 1)
        f2[i] ← f(x[i])
        f1[i] ← f(x[i] + h/2)
    f2[n + 1] ← f(b)
    I ← h/6*(f2[1] + f2[n + 1] + 4*sum(f1[i], i = 1 .. n) + 2*sum(f2[i], i = 2 .. n))
    I
I1 := parab(f, a, b, n)
I1 = 1.03909
I2 := parab(df1, a, b, n)
I2 = 1.54234
